<?xml version="1.0"?>
<?xml-stylesheet type="text/xsl"
	href="http://jsbsim.sourceforge.net/JSBSimScript.xsl"?>


<runscript xmlns:xsi="http://www.w3.org/2001/XMLSchema-instance"
		xsi:noNamespaceSchemaLocation="http://jsbsim.sf.net/JSBSimScript.xsd"
		name="Script for C172x - Test for pitch hold autopilot">


    <!--
        C172x performing a turn and descent with autopilot to
        keep the correct route and wings leveled. This script
        is for testing the pitch holder autopilot during fast
        elevator maneuvers
    -->

    <use aircraft="c172x_unina" initialize="init_mantest_pitch_hold_ap" />
    <run start="0.0" end="300" dt="0.0083333">


        <event name="Trim">
            <description> Trim the aircraft in the initial conditions </description>
            <condition> simulation/sim-time-sec ge 0 </condition>
            <set name="simulation/do_simple_trim" value="1" />
            <notify>
                <property>velocities/vc-kts</property>
                <property>velocities/vt-fps</property>
                <property>attitude/phi-deg</property>
                <property>attitude/theta-deg</property>
                <property>attitude/psi-deg</property>
                <property>ic/h-agl-ft</property>
                <property>simulation/trim-completed</property>
            </notify>
        </event>


        <!-- Turn with autopilot -->

        <event name="Initialization 1">
            <description> Assign reference values to setpoints </description>
            <condition> simulation/trim-completed eq 1 </condition>
            <set name="ap/heading-setpoint" value="90" />
            <set name="ap/theta-angle-setpoint">
                <function>
                    <property>attitude/theta-deg</property>
                </function>
            </set>
            <notify>
                <property>ap/heading-setpoint</property>
                <property>ap/theta-angle-setpoint</property>
            </notify>
        </event>


        <event name="Turn">
            <description>Pursue heading and hold it, with autopilot</description>
            <condition> simulation/sim-time-sec ge 15 </condition>

            <set name="ap/heading-pid-kp"   value="2.50" />
            <set name="ap/heading-pid-ki"   value="0.50" />
            <set name="ap/heading-pid-kd"   value="5.00" />
            <set name="ap/heading-setpoint" value="-30" type="delta" action="ramp" tc="40" />
            <set name="ap/heading-hold"     value="1" />

            <set name="ap/theta-pid-kp" value="10" />
            <set name="ap/theta-pid-ki" value="0.5" />
            <set name="ap/theta-pid-kd" value="4" />
            <set name="ap/theta-angle-hold"   value="1" />
            <notify>
                <property>ap/heading-pid-kp   </property>
                <property>ap/heading-pid-ki   </property>
                <property>ap/heading-pid-kd   </property>
                <property>ap/heading-setpoint </property>
                <property>ap/heading-hold     </property>
                <property>ap/theta-pid-kp     </property>
                <property>ap/theta-pid-ki     </property>
                <property>ap/theta-pid-kd     </property>
                <property>ap/theta-angle-hold </property>
            </notify>
        </event>


        <!-- Flaps and descent -->

        <event name="Descent">
            <description> Set flaps throttle and elevator to landing configuration </description>
            <condition> attitude/psi-deg le 61 </condition>
            <delay> 20 </delay>
            <set name="fcs/flap-pos-deg" value="30" />
            <set name="fcs/throttle-cmd-norm" value="-0.55" type="delta" action="exp" tc="30" />
            <set name="ap/theta-angle-setpoint" value="+1.0" type="delta" action="ramp" tc="5" />
            <notify>
                <property>fcs/elevator-pos-deg </property>
                <property>fcs/elevator-cmd-norm</property>
                <property>fcs/flap-pos-deg     </property>
                <property>fcs/throttle-cmd-norm</property>
            </notify>
        </event>

        <event name="Brakes">
            <description>Make sure brakes are released</description>
            <condition> attitude/psi-deg le 61 </condition>
            <delay> 30 </delay>
            <set name="fcs/left-brake-cmd-norm" value="0"/>
            <set name="fcs/right-brake-cmd-norm" value="0"/>
            <set name="fcs/center-brake-cmd-norm" value="0"/>
            <notify>
                <property>fcs/left-brake-cmd-norm</property>
                <property>fcs/right-brake-cmd-norm </property>
                <property>fcs/center-brake-cmd-norm </property>
            </notify>
        </event>

    </run>
</runscript>
